# OpenSim document version 40000
Model 3DRimlessWheel:
  gravity: 1.703489 -9.660964 0
  Ground
  BodySet:
    Body Pelvis: mass=1 [kg] inertia=(1 1 1 0 0 0)
      Sphere Pelvis_geom_1: radius=0.2
    Body rHind1: mass=0.1 inertia=(0 0 0 0 0 0)
      Cylinder rHind1_geom_1: radius=0.025 half_height=0.25
    Body rHind2: mass=0.1 inertia=(0 0 0 0 0 0)
      Cylinder rHind2_geom_1: radius=0.025 half_height=0.25
    Body rHind3: mass=0.1 inertia=(0 0 0 0 0 0)
      Cylinder rHind3_geom_1: radius=0.025 half_height=0.25
    Body rHind4: mass=0.1 inertia=(0 0 0 0 0 0)
      Cylinder rHind4_geom_1: radius=0.025 half_height=0.25
    Body rHind5: mass=0.1 inertia=(0 0 0 0 0 0)
      Cylinder rHind5_geom_1: radius=0.025 half_height=0.25
    Body rHind6: mass=0.1 inertia=(0 0 0 0 0 0)
      Cylinder rHind6_geom_1: radius=0.025 half_height=0.25
    Body rHind7: mass=0.1 inertia=(0 0 0 0 0 0)
      Cylinder rHind7_geom_1: radius=0.025 half_height=0.25
    Body rHind8: mass=0.1 inertia=(0 0 0 0 0 0)
      Cylinder rHind8_geom_1: radius=0.025 half_height=0.25
    Body rHind9: mass=0.1 inertia=(0 0 0 0 0 0)
      Cylinder rHind9_geom_1: radius=0.025 half_height=0.25
    Body rHind10: mass=0.1 inertia=(0 0 0 0 0 0)
      Cylinder rHind10_geom_1: radius=0.025 half_height=0.25
    Body rHind11: mass=0.1 inertia=(0 0 0 0 0 0)
      Cylinder rHind11_geom_1: radius=0.025 half_height=0.25
    Body rHind12: mass=0.1 inertia=(0 0 0 0 0 0)
      Cylinder rHind12_geom_1: radius=0.025 half_height=0.25
    Body lHind1: mass=0.1 inertia=(0 0 0 0 0 0)
      Cylinder lHind1_geom_1: radius=0.025 half_height=0.25
    Body lHind2: mass=0.1 inertia=(0 0 0 0 0 0)
      Cylinder lHind2_geom_1: radius=0.025 half_height=0.25
    Body lHind3: mass=0.1 inertia=(0 0 0 0 0 0)
      Cylinder lHind3_geom_1: radius=0.025 half_height=0.25
    Body lHind4: mass=0.1 inertia=(0 0 0 0 0 0)
      Cylinder lHind4_geom_1: radius=0.025 half_height=0.25
    Body lHind5: mass=0.1 inertia=(0 0 0 0 0 0)
      Cylinder lHind5_geom_1: radius=0.025 half_height=0.25
    Body lHind6: mass=0.1 inertia=(0 0 0 0 0 0)
      Cylinder lHind6_geom_1: radius=0.025 half_height=0.25
    Body lHind7: mass=0.1 inertia=(0 0 0 0 0 0)
      Cylinder lHind7_geom_1: radius=0.025 half_height=0.25
    Body lHind8: mass=0.1 inertia=(0 0 0 0 0 0)
      Cylinder lHind8_geom_1: radius=0.025 half_height=0.25
    Body lHind9: mass=0.1 inertia=(0 0 0 0 0 0)
      Cylinder lHind9_geom_1: radius=0.025 half_height=0.25
    Body lHind10: mass=0.1 inertia=(0 0 0 0 0 0)
      Cylinder lHind10_geom_1: radius=0.025 half_height=0.25
    Body lHind11: mass=0.1 inertia=(0 0 0 0 0 0)
      Cylinder lHind11_geom_1: radius=0.025 half_height=0.25
    Body lHind12: mass=0.1 inertia=(0 0 0 0 0 0)
      Cylinder lHind12_geom_1: radius=0.025 half_height=0.25
  JointSet:
    CustomJoint PelvisToGround: socket_parent_frame=ground_offset socket_child_frame=Pelvis_offset
      Coordinate Pelvis_rx: default_value=2.624562e-32 default_speed_value=1.50628e-32 range=(-3.141593 3.141593)
      Coordinate Pelvis_ry: default_value=-8.198387e-33 default_speed_value=-9.241698e-34 range=(-3.141593 3.141593)
      Coordinate Pelvis_rz: default_value=0 default_speed_value=-3.203388 range=(-3.141593 3.141593)
      Coordinate Pelvis_tx: default_value=0 default_speed_value=1.719694 range=(-10 10)
      Coordinate Pelvis_ty: default_value=0.5269629 default_speed_value=0.2012648 range=(-5 5)
      Coordinate Pelvis_tz: default_value=-3.373661e-47 default_speed_value=-2.766689e-47 range=(-1 1)
      PhysicalOffsetFrame ground_offset: socket_parent=/ground translation=(0 0 0) [meters]
      PhysicalOffsetFrame Pelvis_offset: socket_parent=/bodyset/Pelvis translation=(0 0 0)
      SpatialTransform:
        TransformAxis rotation1: coordinates=Pelvis_rx axis=(1 0 0) LinearFunction(coefficients=1 0)
        TransformAxis rotation2: coordinates=Pelvis_ry axis=(0 1 0) LinearFunction(coefficients=1 0)
        TransformAxis rotation3: coordinates=Pelvis_rz axis=(0 0 1) LinearFunction(coefficients=1 0)
        TransformAxis translation1: coordinates=Pelvis_tx axis=(1 0 0) LinearFunction(coefficients=1 0)
        TransformAxis translation2: coordinates=Pelvis_ty axis=(0 1 0) LinearFunction(coefficients=1 0)
        TransformAxis translation3: coordinates=Pelvis_tz axis=(0 0 1) LinearFunction(coefficients=1 0)
    WeldJoint rHind1ToPelvis: socket_parent_frame=Pelvis_offset socket_child_frame=rHind1_offset
      PhysicalOffsetFrame Pelvis_offset: socket_parent=/bodyset/Pelvis translation=(0 0 0.2)
      PhysicalOffsetFrame rHind1_offset: socket_parent=/bodyset/rHind1 translation=(0 -0.25 0)
    WeldJoint rHind2ToPelvis: socket_parent_frame=Pelvis_offset socket_child_frame=rHind2_offset
      PhysicalOffsetFrame Pelvis_offset: socket_parent=/bodyset/Pelvis translation=(0 0 0.2)
          orientation=(0 0 0.5235988) [radians]
      PhysicalOffsetFrame rHind2_offset: socket_parent=/bodyset/rHind2 translation=(0 -0.25 0)
    WeldJoint rHind3ToPelvis: socket_parent_frame=Pelvis_offset socket_child_frame=rHind3_offset
      PhysicalOffsetFrame Pelvis_offset: socket_parent=/bodyset/Pelvis translation=(0 0 0.2) orientation=(0 0 1.047198)
      PhysicalOffsetFrame rHind3_offset: socket_parent=/bodyset/rHind3 translation=(0 -0.25 0)
    WeldJoint rHind4ToPelvis: socket_parent_frame=Pelvis_offset socket_child_frame=rHind4_offset
      PhysicalOffsetFrame Pelvis_offset: socket_parent=/bodyset/Pelvis translation=(0 0 0.2) orientation=(0 0 1.570796)
      PhysicalOffsetFrame rHind4_offset: socket_parent=/bodyset/rHind4 translation=(0 -0.25 0)
    WeldJoint rHind5ToPelvis: socket_parent_frame=Pelvis_offset socket_child_frame=rHind5_offset
      PhysicalOffsetFrame Pelvis_offset: socket_parent=/bodyset/Pelvis translation=(0 0 0.2) orientation=(0 0 2.094395)
      PhysicalOffsetFrame rHind5_offset: socket_parent=/bodyset/rHind5 translation=(0 -0.25 0)
    WeldJoint rHind6ToPelvis: socket_parent_frame=Pelvis_offset socket_child_frame=rHind6_offset
      PhysicalOffsetFrame Pelvis_offset: socket_parent=/bodyset/Pelvis translation=(0 0 0.2) orientation=(0 0 2.617994)
      PhysicalOffsetFrame rHind6_offset: socket_parent=/bodyset/rHind6 translation=(0 -0.25 0)
    WeldJoint rHind7ToPelvis: socket_parent_frame=Pelvis_offset socket_child_frame=rHind7_offset
      PhysicalOffsetFrame Pelvis_offset: socket_parent=/bodyset/Pelvis translation=(0 0 0.2) orientation=(0 0 3.141593)
      PhysicalOffsetFrame rHind7_offset: socket_parent=/bodyset/rHind7 translation=(0 -0.25 0)
    WeldJoint rHind8ToPelvis: socket_parent_frame=Pelvis_offset socket_child_frame=rHind8_offset
      PhysicalOffsetFrame Pelvis_offset: socket_parent=/bodyset/Pelvis translation=(0 0 0.2)
          orientation=(0 0 -2.617994)
      PhysicalOffsetFrame rHind8_offset: socket_parent=/bodyset/rHind8 translation=(0 -0.25 0)
    WeldJoint rHind9ToPelvis: socket_parent_frame=Pelvis_offset socket_child_frame=rHind9_offset
      PhysicalOffsetFrame Pelvis_offset: socket_parent=/bodyset/Pelvis translation=(0 0 0.2)
          orientation=(0 0 -2.094395)
      PhysicalOffsetFrame rHind9_offset: socket_parent=/bodyset/rHind9 translation=(0 -0.25 0)
    WeldJoint rHind10ToPelvis: socket_parent_frame=Pelvis_offset socket_child_frame=rHind10_offset
      PhysicalOffsetFrame Pelvis_offset: socket_parent=/bodyset/Pelvis translation=(0 0 0.2)
          orientation=(0 0 -1.570796)
      PhysicalOffsetFrame rHind10_offset: socket_parent=/bodyset/rHind10 translation=(0 -0.25 0)
    WeldJoint rHind11ToPelvis: socket_parent_frame=Pelvis_offset socket_child_frame=rHind11_offset
      PhysicalOffsetFrame Pelvis_offset: socket_parent=/bodyset/Pelvis translation=(0 0 0.2)
          orientation=(0 0 -1.047198)
      PhysicalOffsetFrame rHind11_offset: socket_parent=/bodyset/rHind11 translation=(0 -0.25 0)
    WeldJoint rHind12ToPelvis: socket_parent_frame=Pelvis_offset socket_child_frame=rHind12_offset
      PhysicalOffsetFrame Pelvis_offset: socket_parent=/bodyset/Pelvis translation=(0 0 0.2)
          orientation=(0 0 -0.5235988)
      PhysicalOffsetFrame rHind12_offset: socket_parent=/bodyset/rHind12 translation=(0 -0.25 0)
    WeldJoint lHind1ToPelvis: socket_parent_frame=Pelvis_offset socket_child_frame=lHind1_offset
      PhysicalOffsetFrame Pelvis_offset: socket_parent=/bodyset/Pelvis translation=(0 0 -0.2)
      PhysicalOffsetFrame lHind1_offset: socket_parent=/bodyset/lHind1 translation=(0 -0.25 0)
    WeldJoint lHind2ToPelvis: socket_parent_frame=Pelvis_offset socket_child_frame=lHind2_offset
      PhysicalOffsetFrame Pelvis_offset: socket_parent=/bodyset/Pelvis translation=(0 0 -0.2)
          orientation=(0 0 0.5235988)
      PhysicalOffsetFrame lHind2_offset: socket_parent=/bodyset/lHind2 translation=(0 -0.25 0)
    WeldJoint lHind3ToPelvis: socket_parent_frame=Pelvis_offset socket_child_frame=lHind3_offset
      PhysicalOffsetFrame Pelvis_offset: socket_parent=/bodyset/Pelvis translation=(0 0 -0.2)
          orientation=(0 0 1.047198)
      PhysicalOffsetFrame lHind3_offset: socket_parent=/bodyset/lHind3 translation=(0 -0.25 0)
    WeldJoint lHind4ToPelvis: socket_parent_frame=Pelvis_offset socket_child_frame=lHind4_offset
      PhysicalOffsetFrame Pelvis_offset: socket_parent=/bodyset/Pelvis translation=(0 0 -0.2)
          orientation=(0 0 1.570796)
      PhysicalOffsetFrame lHind4_offset: socket_parent=/bodyset/lHind4 translation=(0 -0.25 0)
    WeldJoint lHind5ToPelvis: socket_parent_frame=Pelvis_offset socket_child_frame=lHind5_offset
      PhysicalOffsetFrame Pelvis_offset: socket_parent=/bodyset/Pelvis translation=(0 0 -0.2)
          orientation=(0 0 2.094395)
      PhysicalOffsetFrame lHind5_offset: socket_parent=/bodyset/lHind5 translation=(0 -0.25 0)
    WeldJoint lHind6ToPelvis: socket_parent_frame=Pelvis_offset socket_child_frame=lHind6_offset
      PhysicalOffsetFrame Pelvis_offset: socket_parent=/bodyset/Pelvis translation=(0 0 -0.2)
          orientation=(0 0 2.617994)
      PhysicalOffsetFrame lHind6_offset: socket_parent=/bodyset/lHind6 translation=(0 -0.25 0)
    WeldJoint lHind7ToPelvis: socket_parent_frame=Pelvis_offset socket_child_frame=lHind7_offset
      PhysicalOffsetFrame Pelvis_offset: socket_parent=/bodyset/Pelvis translation=(0 0 -0.2)
          orientation=(0 0 3.141593)
      PhysicalOffsetFrame lHind7_offset: socket_parent=/bodyset/lHind7 translation=(0 -0.25 0)
    WeldJoint lHind8ToPelvis: socket_parent_frame=Pelvis_offset socket_child_frame=lHind8_offset
      PhysicalOffsetFrame Pelvis_offset: socket_parent=/bodyset/Pelvis translation=(0 0 -0.2)
          orientation=(0 0 -2.617994)
      PhysicalOffsetFrame lHind8_offset: socket_parent=/bodyset/lHind8 translation=(0 -0.25 0)
    WeldJoint lHind9ToPelvis: socket_parent_frame=Pelvis_offset socket_child_frame=lHind9_offset
      PhysicalOffsetFrame Pelvis_offset: socket_parent=/bodyset/Pelvis translation=(0 0 -0.2)
          orientation=(0 0 -2.094395)
      PhysicalOffsetFrame lHind9_offset: socket_parent=/bodyset/lHind9 translation=(0 -0.25 0)
    WeldJoint lHind10ToPelvis: socket_parent_frame=Pelvis_offset socket_child_frame=lHind10_offset
      PhysicalOffsetFrame Pelvis_offset: socket_parent=/bodyset/Pelvis translation=(0 0 -0.2)
          orientation=(0 0 -1.570796)
      PhysicalOffsetFrame lHind10_offset: socket_parent=/bodyset/lHind10 translation=(0 -0.25 0)
    WeldJoint lHind11ToPelvis: socket_parent_frame=Pelvis_offset socket_child_frame=lHind11_offset
      PhysicalOffsetFrame Pelvis_offset: socket_parent=/bodyset/Pelvis translation=(0 0 -0.2)
          orientation=(0 0 -1.047198)
      PhysicalOffsetFrame lHind11_offset: socket_parent=/bodyset/lHind11 translation=(0 -0.25 0)
    WeldJoint lHind12ToPelvis: socket_parent_frame=Pelvis_offset socket_child_frame=lHind12_offset
      PhysicalOffsetFrame Pelvis_offset: socket_parent=/bodyset/Pelvis translation=(0 0 -0.2)
          orientation=(0 0 -0.5235988)
      PhysicalOffsetFrame lHind12_offset: socket_parent=/bodyset/lHind12 translation=(0 -0.25 0)
  ForceSet:
    SmoothSphereHalfSpaceForce [values shared by the 24 below unless stated]: socket_half_space=/contactgeometryset/GroundContact
        stiffness=1000000 [N/m^2] dissipation=2 [s/m] static_friction=0.8 dynamic_friction=0.4 viscous_friction=0.4
        transition_velocity=0.2 [m/s]
    SmoothSphereHalfSpaceForce rHind1Force: socket_sphere=/contactgeometryset/rHind1Contact
    SmoothSphereHalfSpaceForce rHind2Force: socket_sphere=/contactgeometryset/rHind2Contact
    SmoothSphereHalfSpaceForce rHind3Force: socket_sphere=/contactgeometryset/rHind3Contact
    SmoothSphereHalfSpaceForce rHind4Force: socket_sphere=/contactgeometryset/rHind4Contact
    SmoothSphereHalfSpaceForce rHind5Force: socket_sphere=/contactgeometryset/rHind5Contact
    SmoothSphereHalfSpaceForce rHind6Force: socket_sphere=/contactgeometryset/rHind6Contact
    SmoothSphereHalfSpaceForce rHind7Force: socket_sphere=/contactgeometryset/rHind7Contact
    SmoothSphereHalfSpaceForce rHind8Force: socket_sphere=/contactgeometryset/rHind8Contact
    SmoothSphereHalfSpaceForce rHind9Force: socket_sphere=/contactgeometryset/rHind9Contact
    SmoothSphereHalfSpaceForce rHind10Force: socket_sphere=/contactgeometryset/rHind10Contact
    SmoothSphereHalfSpaceForce rHind11Force: socket_sphere=/contactgeometryset/rHind11Contact
    SmoothSphereHalfSpaceForce rHind12Force: socket_sphere=/contactgeometryset/rHind12Contact
    SmoothSphereHalfSpaceForce lHind1Force: socket_sphere=/contactgeometryset/lHind1Contact
    SmoothSphereHalfSpaceForce lHind2Force: socket_sphere=/contactgeometryset/lHind2Contact
    SmoothSphereHalfSpaceForce lHind3Force: socket_sphere=/contactgeometryset/lHind3Contact
    SmoothSphereHalfSpaceForce lHind4Force: socket_sphere=/contactgeometryset/lHind4Contact
    SmoothSphereHalfSpaceForce lHind5Force: socket_sphere=/contactgeometryset/lHind5Contact
    SmoothSphereHalfSpaceForce lHind6Force: socket_sphere=/contactgeometryset/lHind6Contact
    SmoothSphereHalfSpaceForce lHind7Force: socket_sphere=/contactgeometryset/lHind7Contact
    SmoothSphereHalfSpaceForce lHind8Force: socket_sphere=/contactgeometryset/lHind8Contact
    SmoothSphereHalfSpaceForce lHind9Force: socket_sphere=/contactgeometryset/lHind9Contact
    SmoothSphereHalfSpaceForce lHind10Force: socket_sphere=/contactgeometryset/lHind10Contact
    SmoothSphereHalfSpaceForce lHind11Force: socket_sphere=/contactgeometryset/lHind11Contact
    SmoothSphereHalfSpaceForce lHind12Force: socket_sphere=/contactgeometryset/lHind12Contact
  ContactGeometrySet:
    ContactHalfSpace GroundContact: socket_frame=/ground location=(0 0 0) orientation=(0 0 -1.570796)
    ContactSphere rHind1Contact: socket_frame=/bodyset/rHind1 location=(0 0.25 0) radius=0.025
    ContactSphere rHind2Contact: socket_frame=/bodyset/rHind2 location=(0 0.25 0) radius=0.025
    ContactSphere rHind3Contact: socket_frame=/bodyset/rHind3 location=(0 0.25 0) radius=0.025
    ContactSphere rHind4Contact: socket_frame=/bodyset/rHind4 location=(0 0.25 0) radius=0.025
    ContactSphere rHind5Contact: socket_frame=/bodyset/rHind5 location=(0 0.25 0) radius=0.025
    ContactSphere rHind6Contact: socket_frame=/bodyset/rHind6 location=(0 0.25 0) radius=0.025
    ContactSphere rHind7Contact: socket_frame=/bodyset/rHind7 location=(0 0.25 0) radius=0.025
    ContactSphere rHind8Contact: socket_frame=/bodyset/rHind8 location=(0 0.25 0) radius=0.025
    ContactSphere rHind9Contact: socket_frame=/bodyset/rHind9 location=(0 0.25 0) radius=0.025
    ContactSphere rHind10Contact: socket_frame=/bodyset/rHind10 location=(0 0.25 0) radius=0.025
    ContactSphere rHind11Contact: socket_frame=/bodyset/rHind11 location=(0 0.25 0) radius=0.025
    ContactSphere rHind12Contact: socket_frame=/bodyset/rHind12 location=(0 0.25 0) radius=0.025
    ContactSphere lHind1Contact: socket_frame=/bodyset/lHind1 location=(0 0.25 0) radius=0.025
    ContactSphere lHind2Contact: socket_frame=/bodyset/lHind2 location=(0 0.25 0) radius=0.025
    ContactSphere lHind3Contact: socket_frame=/bodyset/lHind3 location=(0 0.25 0) radius=0.025
    ContactSphere lHind4Contact: socket_frame=/bodyset/lHind4 location=(0 0.25 0) radius=0.025
    ContactSphere lHind5Contact: socket_frame=/bodyset/lHind5 location=(0 0.25 0) radius=0.025
    ContactSphere lHind6Contact: socket_frame=/bodyset/lHind6 location=(0 0.25 0) radius=0.025
    ContactSphere lHind7Contact: socket_frame=/bodyset/lHind7 location=(0 0.25 0) radius=0.025
    ContactSphere lHind8Contact: socket_frame=/bodyset/lHind8 location=(0 0.25 0) radius=0.025
    ContactSphere lHind9Contact: socket_frame=/bodyset/lHind9 location=(0 0.25 0) radius=0.025
    ContactSphere lHind10Contact: socket_frame=/bodyset/lHind10 location=(0 0.25 0) radius=0.025
    ContactSphere lHind11Contact: socket_frame=/bodyset/lHind11 location=(0 0.25 0) radius=0.025
    ContactSphere lHind12Contact: socket_frame=/bodyset/lHind12 location=(0 0.25 0) radius=0.025
