# OpenSim document version 40000
Model 3DRimlessWheel:
  gravity: 0.4279062 -9.800663 0
  Ground
  BodySet:
    Body Pelvis: mass=1 [kg] inertia=(1 1 1 0 0 0)
      Sphere Pelvis_geom_1: radius=0.2
    Body rHind1: mass=0.1 inertia=(0 0 0 0 0 0)
      Cylinder rHind1_geom_1: radius=0.025 half_height=0.25
    Body rHind2: mass=0.1 inertia=(0 0 0 0 0 0)
      Cylinder rHind2_geom_1: radius=0.025 half_height=0.25
    Body rHind3: mass=0.1 inertia=(0 0 0 0 0 0)
      Cylinder rHind3_geom_1: radius=0.025 half_height=0.25
    Body rHind4: mass=0.1 inertia=(0 0 0 0 0 0)
      Cylinder rHind4_geom_1: radius=0.025 half_height=0.25
    Body rHind5: mass=0.1 inertia=(0 0 0 0 0 0)
      Cylinder rHind5_geom_1: radius=0.025 half_height=0.25
    Body rHind6: mass=0.1 inertia=(0 0 0 0 0 0)
      Cylinder rHind6_geom_1: radius=0.025 half_height=0.25
    Body lHind1: mass=0.1 inertia=(0 0 0 0 0 0)
      Cylinder lHind1_geom_1: radius=0.025 half_height=0.25
    Body lHind2: mass=0.1 inertia=(0 0 0 0 0 0)
      Cylinder lHind2_geom_1: radius=0.025 half_height=0.25
    Body lHind3: mass=0.1 inertia=(0 0 0 0 0 0)
      Cylinder lHind3_geom_1: radius=0.025 half_height=0.25
    Body lHind4: mass=0.1 inertia=(0 0 0 0 0 0)
      Cylinder lHind4_geom_1: radius=0.025 half_height=0.25
    Body lHind5: mass=0.1 inertia=(0 0 0 0 0 0)
      Cylinder lHind5_geom_1: radius=0.025 half_height=0.25
    Body lHind6: mass=0.1 inertia=(0 0 0 0 0 0)
      Cylinder lHind6_geom_1: radius=0.025 half_height=0.25
  JointSet:
    CustomJoint PelvisToGround: socket_parent_frame=ground_offset socket_child_frame=Pelvis_offset
      Coordinate Pelvis_rx: default_value=-1.392852e-16 default_speed_value=-4.777668e-17 range=(-3.141593 3.141593)
      Coordinate Pelvis_ry: default_value=-3.029009e-18 default_speed_value=-3.295634e-19 range=(-3.141593 3.141593)
      Coordinate Pelvis_rz: default_value=0 default_speed_value=-1.33012 range=(-3.141593 3.141593)
      Coordinate Pelvis_tx: default_value=0 default_speed_value=0.7016439 range=(-10 10)
      Coordinate Pelvis_ty: default_value=0.5218042 default_speed_value=0.0223287 range=(-5 5)
      Coordinate Pelvis_tz: default_value=2.113292e-32 default_speed_value=1.567439e-32 range=(-1 1)
      PhysicalOffsetFrame ground_offset: socket_parent=/ground translation=(0 0 0) [meters]
      PhysicalOffsetFrame Pelvis_offset: socket_parent=/bodyset/Pelvis translation=(0 0 0)
      SpatialTransform:
        TransformAxis rotation1: coordinates=Pelvis_rx axis=(1 0 0) LinearFunction(coefficients=1 0)
        TransformAxis rotation2: coordinates=Pelvis_ry axis=(0 1 0) LinearFunction(coefficients=1 0)
        TransformAxis rotation3: coordinates=Pelvis_rz axis=(0 0 1) LinearFunction(coefficients=1 0)
        TransformAxis translation1: coordinates=Pelvis_tx axis=(1 0 0) LinearFunction(coefficients=1 0)
        TransformAxis translation2: coordinates=Pelvis_ty axis=(0 1 0) LinearFunction(coefficients=1 0)
        TransformAxis translation3: coordinates=Pelvis_tz axis=(0 0 1) LinearFunction(coefficients=1 0)
    WeldJoint rHind1ToPelvis: socket_parent_frame=Pelvis_offset socket_child_frame=rHind1_offset
      PhysicalOffsetFrame Pelvis_offset: socket_parent=/bodyset/Pelvis translation=(0 0 0.2)
          orientation=(0 0 0.5235988) [radians]
      PhysicalOffsetFrame rHind1_offset: socket_parent=/bodyset/rHind1 translation=(0 -0.25 0)
    WeldJoint rHind2ToPelvis: socket_parent_frame=Pelvis_offset socket_child_frame=rHind2_offset
      PhysicalOffsetFrame Pelvis_offset: socket_parent=/bodyset/Pelvis translation=(0 0 0.2) orientation=(0 0 1.570796)
      PhysicalOffsetFrame rHind2_offset: socket_parent=/bodyset/rHind2 translation=(0 -0.25 0)
    WeldJoint rHind3ToPelvis: socket_parent_frame=Pelvis_offset socket_child_frame=rHind3_offset
      PhysicalOffsetFrame Pelvis_offset: socket_parent=/bodyset/Pelvis translation=(0 0 0.2) orientation=(0 0 2.617994)
      PhysicalOffsetFrame rHind3_offset: socket_parent=/bodyset/rHind3 translation=(0 -0.25 0)
    WeldJoint rHind4ToPelvis: socket_parent_frame=Pelvis_offset socket_child_frame=rHind4_offset
      PhysicalOffsetFrame Pelvis_offset: socket_parent=/bodyset/Pelvis translation=(0 0 0.2)
          orientation=(0 0 -2.617994)
      PhysicalOffsetFrame rHind4_offset: socket_parent=/bodyset/rHind4 translation=(0 -0.25 0)
    WeldJoint rHind5ToPelvis: socket_parent_frame=Pelvis_offset socket_child_frame=rHind5_offset
      PhysicalOffsetFrame Pelvis_offset: socket_parent=/bodyset/Pelvis translation=(0 0 0.2)
          orientation=(0 0 -1.570796)
      PhysicalOffsetFrame rHind5_offset: socket_parent=/bodyset/rHind5 translation=(0 -0.25 0)
    WeldJoint rHind6ToPelvis: socket_parent_frame=Pelvis_offset socket_child_frame=rHind6_offset
      PhysicalOffsetFrame Pelvis_offset: socket_parent=/bodyset/Pelvis translation=(0 0 0.2)
          orientation=(0 0 -0.5235988)
      PhysicalOffsetFrame rHind6_offset: socket_parent=/bodyset/rHind6 translation=(0 -0.25 0)
    WeldJoint lHind1ToPelvis: socket_parent_frame=Pelvis_offset socket_child_frame=lHind1_offset
      PhysicalOffsetFrame Pelvis_offset: socket_parent=/bodyset/Pelvis translation=(0 0 -0.2)
      PhysicalOffsetFrame lHind1_offset: socket_parent=/bodyset/lHind1 translation=(0 -0.25 0)
    WeldJoint lHind2ToPelvis: socket_parent_frame=Pelvis_offset socket_child_frame=lHind2_offset
      PhysicalOffsetFrame Pelvis_offset: socket_parent=/bodyset/Pelvis translation=(0 0 -0.2)
          orientation=(0 0 1.047198)
      PhysicalOffsetFrame lHind2_offset: socket_parent=/bodyset/lHind2 translation=(0 -0.25 0)
    WeldJoint lHind3ToPelvis: socket_parent_frame=Pelvis_offset socket_child_frame=lHind3_offset
      PhysicalOffsetFrame Pelvis_offset: socket_parent=/bodyset/Pelvis translation=(0 0 -0.2)
          orientation=(0 0 2.094395)
      PhysicalOffsetFrame lHind3_offset: socket_parent=/bodyset/lHind3 translation=(0 -0.25 0)
    WeldJoint lHind4ToPelvis: socket_parent_frame=Pelvis_offset socket_child_frame=lHind4_offset
      PhysicalOffsetFrame Pelvis_offset: socket_parent=/bodyset/Pelvis translation=(0 0 -0.2)
          orientation=(0 0 3.141593)
      PhysicalOffsetFrame lHind4_offset: socket_parent=/bodyset/lHind4 translation=(0 -0.25 0)
    WeldJoint lHind5ToPelvis: socket_parent_frame=Pelvis_offset socket_child_frame=lHind5_offset
      PhysicalOffsetFrame Pelvis_offset: socket_parent=/bodyset/Pelvis translation=(0 0 -0.2)
          orientation=(0 0 -2.094395)
      PhysicalOffsetFrame lHind5_offset: socket_parent=/bodyset/lHind5 translation=(0 -0.25 0)
    WeldJoint lHind6ToPelvis: socket_parent_frame=Pelvis_offset socket_child_frame=lHind6_offset
      PhysicalOffsetFrame Pelvis_offset: socket_parent=/bodyset/Pelvis translation=(0 0 -0.2)
          orientation=(0 0 -1.047198)
      PhysicalOffsetFrame lHind6_offset: socket_parent=/bodyset/lHind6 translation=(0 -0.25 0)
  ForceSet:
    SmoothSphereHalfSpaceForce [values shared by the 12 below unless stated]: socket_half_space=/contactgeometryset/GroundContact
        stiffness=1000000 [N/m^2] dissipation=2 [s/m] static_friction=0.8 dynamic_friction=0.4 viscous_friction=0.4
        transition_velocity=0.2 [m/s]
    SmoothSphereHalfSpaceForce rHind1Force: socket_sphere=/contactgeometryset/rHind1Contact
    SmoothSphereHalfSpaceForce rHind2Force: socket_sphere=/contactgeometryset/rHind2Contact
    SmoothSphereHalfSpaceForce rHind3Force: socket_sphere=/contactgeometryset/rHind3Contact
    SmoothSphereHalfSpaceForce rHind4Force: socket_sphere=/contactgeometryset/rHind4Contact
    SmoothSphereHalfSpaceForce rHind5Force: socket_sphere=/contactgeometryset/rHind5Contact
    SmoothSphereHalfSpaceForce rHind6Force: socket_sphere=/contactgeometryset/rHind6Contact
    SmoothSphereHalfSpaceForce lHind1Force: socket_sphere=/contactgeometryset/lHind1Contact
    SmoothSphereHalfSpaceForce lHind2Force: socket_sphere=/contactgeometryset/lHind2Contact
    SmoothSphereHalfSpaceForce lHind3Force: socket_sphere=/contactgeometryset/lHind3Contact
    SmoothSphereHalfSpaceForce lHind4Force: socket_sphere=/contactgeometryset/lHind4Contact
    SmoothSphereHalfSpaceForce lHind5Force: socket_sphere=/contactgeometryset/lHind5Contact
    SmoothSphereHalfSpaceForce lHind6Force: socket_sphere=/contactgeometryset/lHind6Contact
  ContactGeometrySet:
    ContactHalfSpace GroundContact: socket_frame=/ground location=(0 0 0) orientation=(0 0 -1.570796)
    ContactSphere rHind1Contact: socket_frame=/bodyset/rHind1 location=(0 0.25 0) radius=0.025
    ContactSphere rHind2Contact: socket_frame=/bodyset/rHind2 location=(0 0.25 0) radius=0.025
    ContactSphere rHind3Contact: socket_frame=/bodyset/rHind3 location=(0 0.25 0) radius=0.025
    ContactSphere rHind4Contact: socket_frame=/bodyset/rHind4 location=(0 0.25 0) radius=0.025
    ContactSphere rHind5Contact: socket_frame=/bodyset/rHind5 location=(0 0.25 0) radius=0.025
    ContactSphere rHind6Contact: socket_frame=/bodyset/rHind6 location=(0 0.25 0) radius=0.025
    ContactSphere lHind1Contact: socket_frame=/bodyset/lHind1 location=(0 0.25 0) radius=0.025
    ContactSphere lHind2Contact: socket_frame=/bodyset/lHind2 location=(0 0.25 0) radius=0.025
    ContactSphere lHind3Contact: socket_frame=/bodyset/lHind3 location=(0 0.25 0) radius=0.025
    ContactSphere lHind4Contact: socket_frame=/bodyset/lHind4 location=(0 0.25 0) radius=0.025
    ContactSphere lHind5Contact: socket_frame=/bodyset/lHind5 location=(0 0.25 0) radius=0.025
    ContactSphere lHind6Contact: socket_frame=/bodyset/lHind6 location=(0 0.25 0) radius=0.025
