# OpenSim document version 40000
Model PlanarRimlessWheel:
  gravity: 0.8549978 -9.77267 0
  Ground
  BodySet:
    Body Pelvis: mass=1 [kg] inertia=(1 1 1 0 0 0)
      Sphere Pelvis_geom_1: radius=0.2
    Body rHind1: mass=0.1 inertia=(0 0 0 0 0 0)
      Cylinder rHind1_geom_1: radius=0.025 half_height=0.25
    Body rHind2: mass=0.1 inertia=(0 0 0 0 0 0)
      Cylinder rHind2_geom_1: radius=0.025 half_height=0.25
    Body rHind3: mass=0.1 inertia=(0 0 0 0 0 0)
      Cylinder rHind3_geom_1: radius=0.025 half_height=0.25
    Body rHind4: mass=0.1 inertia=(0 0 0 0 0 0)
      Cylinder rHind4_geom_1: radius=0.025 half_height=0.25
    Body rHind5: mass=0.1 inertia=(0 0 0 0 0 0)
      Cylinder rHind5_geom_1: radius=0.025 half_height=0.25
    Body rHind6: mass=0.1 inertia=(0 0 0 0 0 0)
      Cylinder rHind6_geom_1: radius=0.025 half_height=0.25
    Body rHind7: mass=0.1 inertia=(0 0 0 0 0 0)
      Cylinder rHind7_geom_1: radius=0.025 half_height=0.25
    Body rHind8: mass=0.1 inertia=(0 0 0 0 0 0)
      Cylinder rHind8_geom_1: radius=0.025 half_height=0.25
    Body rHind9: mass=0.1 inertia=(0 0 0 0 0 0)
      Cylinder rHind9_geom_1: radius=0.025 half_height=0.25
    Body rHind10: mass=0.1 inertia=(0 0 0 0 0 0)
      Cylinder rHind10_geom_1: radius=0.025 half_height=0.25
    Body rHind11: mass=0.1 inertia=(0 0 0 0 0 0)
      Cylinder rHind11_geom_1: radius=0.025 half_height=0.25
    Body rHind12: mass=0.1 inertia=(0 0 0 0 0 0)
      Cylinder rHind12_geom_1: radius=0.025 half_height=0.25
  JointSet:
    PlanarJoint PelvisToGround: socket_parent_frame=/ground socket_child_frame=/bodyset/Pelvis
      Coordinate Pelvis_rz: default_value=0 default_speed_value=-2.690648 range=(-3.141593 3.141593)
      Coordinate Pelvis_tx: default_value=0 default_speed_value=1.435308 range=(-10 10)
      Coordinate Pelvis_ty: default_value=0.5263246 default_speed_value=0.02411574 range=(-5 5)
    WeldJoint rHind1ToPelvis: socket_parent_frame=Pelvis_offset socket_child_frame=rHind1_offset
      PhysicalOffsetFrame Pelvis_offset: socket_parent=/bodyset/Pelvis translation=(0 0 0.2) [meters]
      PhysicalOffsetFrame rHind1_offset: socket_parent=/bodyset/rHind1 translation=(0 -0.25 0)
    WeldJoint rHind2ToPelvis: socket_parent_frame=Pelvis_offset socket_child_frame=rHind2_offset
      PhysicalOffsetFrame Pelvis_offset: socket_parent=/bodyset/Pelvis translation=(0 0 0.2)
          orientation=(0 0 0.5235988) [radians]
      PhysicalOffsetFrame rHind2_offset: socket_parent=/bodyset/rHind2 translation=(0 -0.25 0)
    WeldJoint rHind3ToPelvis: socket_parent_frame=Pelvis_offset socket_child_frame=rHind3_offset
      PhysicalOffsetFrame Pelvis_offset: socket_parent=/bodyset/Pelvis translation=(0 0 0.2) orientation=(0 0 1.047198)
      PhysicalOffsetFrame rHind3_offset: socket_parent=/bodyset/rHind3 translation=(0 -0.25 0)
    WeldJoint rHind4ToPelvis: socket_parent_frame=Pelvis_offset socket_child_frame=rHind4_offset
      PhysicalOffsetFrame Pelvis_offset: socket_parent=/bodyset/Pelvis translation=(0 0 0.2) orientation=(0 0 1.570796)
      PhysicalOffsetFrame rHind4_offset: socket_parent=/bodyset/rHind4 translation=(0 -0.25 0)
    WeldJoint rHind5ToPelvis: socket_parent_frame=Pelvis_offset socket_child_frame=rHind5_offset
      PhysicalOffsetFrame Pelvis_offset: socket_parent=/bodyset/Pelvis translation=(0 0 0.2) orientation=(0 0 2.094395)
      PhysicalOffsetFrame rHind5_offset: socket_parent=/bodyset/rHind5 translation=(0 -0.25 0)
    WeldJoint rHind6ToPelvis: socket_parent_frame=Pelvis_offset socket_child_frame=rHind6_offset
      PhysicalOffsetFrame Pelvis_offset: socket_parent=/bodyset/Pelvis translation=(0 0 0.2) orientation=(0 0 2.617994)
      PhysicalOffsetFrame rHind6_offset: socket_parent=/bodyset/rHind6 translation=(0 -0.25 0)
    WeldJoint rHind7ToPelvis: socket_parent_frame=Pelvis_offset socket_child_frame=rHind7_offset
      PhysicalOffsetFrame Pelvis_offset: socket_parent=/bodyset/Pelvis translation=(0 0 0.2) orientation=(0 0 3.141593)
      PhysicalOffsetFrame rHind7_offset: socket_parent=/bodyset/rHind7 translation=(0 -0.25 0)
    WeldJoint rHind8ToPelvis: socket_parent_frame=Pelvis_offset socket_child_frame=rHind8_offset
      PhysicalOffsetFrame Pelvis_offset: socket_parent=/bodyset/Pelvis translation=(0 0 0.2)
          orientation=(0 0 -2.617994)
      PhysicalOffsetFrame rHind8_offset: socket_parent=/bodyset/rHind8 translation=(0 -0.25 0)
    WeldJoint rHind9ToPelvis: socket_parent_frame=Pelvis_offset socket_child_frame=rHind9_offset
      PhysicalOffsetFrame Pelvis_offset: socket_parent=/bodyset/Pelvis translation=(0 0 0.2)
          orientation=(0 0 -2.094395)
      PhysicalOffsetFrame rHind9_offset: socket_parent=/bodyset/rHind9 translation=(0 -0.25 0)
    WeldJoint rHind10ToPelvis: socket_parent_frame=Pelvis_offset socket_child_frame=rHind10_offset
      PhysicalOffsetFrame Pelvis_offset: socket_parent=/bodyset/Pelvis translation=(0 0 0.2)
          orientation=(0 0 -1.570796)
      PhysicalOffsetFrame rHind10_offset: socket_parent=/bodyset/rHind10 translation=(0 -0.25 0)
    WeldJoint rHind11ToPelvis: socket_parent_frame=Pelvis_offset socket_child_frame=rHind11_offset
      PhysicalOffsetFrame Pelvis_offset: socket_parent=/bodyset/Pelvis translation=(0 0 0.2)
          orientation=(0 0 -1.047198)
      PhysicalOffsetFrame rHind11_offset: socket_parent=/bodyset/rHind11 translation=(0 -0.25 0)
    WeldJoint rHind12ToPelvis: socket_parent_frame=Pelvis_offset socket_child_frame=rHind12_offset
      PhysicalOffsetFrame Pelvis_offset: socket_parent=/bodyset/Pelvis translation=(0 0 0.2)
          orientation=(0 0 -0.5235988)
      PhysicalOffsetFrame rHind12_offset: socket_parent=/bodyset/rHind12 translation=(0 -0.25 0)
  ForceSet:
    SmoothSphereHalfSpaceForce [values shared by the 12 below unless stated]: socket_half_space=/contactgeometryset/GroundContact
        stiffness=1000000 [N/m^2] dissipation=2 [s/m] static_friction=0.8 dynamic_friction=0.4 viscous_friction=0.4
        transition_velocity=0.2 [m/s]
    SmoothSphereHalfSpaceForce rHind1Force: socket_sphere=/contactgeometryset/rHind1Contact
    SmoothSphereHalfSpaceForce rHind2Force: socket_sphere=/contactgeometryset/rHind2Contact
    SmoothSphereHalfSpaceForce rHind3Force: socket_sphere=/contactgeometryset/rHind3Contact
    SmoothSphereHalfSpaceForce rHind4Force: socket_sphere=/contactgeometryset/rHind4Contact
    SmoothSphereHalfSpaceForce rHind5Force: socket_sphere=/contactgeometryset/rHind5Contact
    SmoothSphereHalfSpaceForce rHind6Force: socket_sphere=/contactgeometryset/rHind6Contact
    SmoothSphereHalfSpaceForce rHind7Force: socket_sphere=/contactgeometryset/rHind7Contact
    SmoothSphereHalfSpaceForce rHind8Force: socket_sphere=/contactgeometryset/rHind8Contact
    SmoothSphereHalfSpaceForce rHind9Force: socket_sphere=/contactgeometryset/rHind9Contact
    SmoothSphereHalfSpaceForce rHind10Force: socket_sphere=/contactgeometryset/rHind10Contact
    SmoothSphereHalfSpaceForce rHind11Force: socket_sphere=/contactgeometryset/rHind11Contact
    SmoothSphereHalfSpaceForce rHind12Force: socket_sphere=/contactgeometryset/rHind12Contact
  ContactGeometrySet:
    ContactHalfSpace GroundContact: socket_frame=/ground location=(0 0 0) orientation=(0 0 -1.570796)
    ContactSphere rHind1Contact: socket_frame=/bodyset/rHind1 location=(0 0.25 0) radius=0.025
    ContactSphere rHind2Contact: socket_frame=/bodyset/rHind2 location=(0 0.25 0) radius=0.025
    ContactSphere rHind3Contact: socket_frame=/bodyset/rHind3 location=(0 0.25 0) radius=0.025
    ContactSphere rHind4Contact: socket_frame=/bodyset/rHind4 location=(0 0.25 0) radius=0.025
    ContactSphere rHind5Contact: socket_frame=/bodyset/rHind5 location=(0 0.25 0) radius=0.025
    ContactSphere rHind6Contact: socket_frame=/bodyset/rHind6 location=(0 0.25 0) radius=0.025
    ContactSphere rHind7Contact: socket_frame=/bodyset/rHind7 location=(0 0.25 0) radius=0.025
    ContactSphere rHind8Contact: socket_frame=/bodyset/rHind8 location=(0 0.25 0) radius=0.025
    ContactSphere rHind9Contact: socket_frame=/bodyset/rHind9 location=(0 0.25 0) radius=0.025
    ContactSphere rHind10Contact: socket_frame=/bodyset/rHind10 location=(0 0.25 0) radius=0.025
    ContactSphere rHind11Contact: socket_frame=/bodyset/rHind11 location=(0 0.25 0) radius=0.025
    ContactSphere rHind12Contact: socket_frame=/bodyset/rHind12 location=(0 0.25 0) radius=0.025
